M := transpose([
    10.6, 10.9, 15.2, 17.3, 18.2, 16.1, 13.2, 17.1, 22.9, 21.4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])
n := 50
x := sort(M) = [
    10.3; 10.6; 10.6; 10.7; 10.8; 10.9; 10.9; 11; 11.1; 11.4
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]
min(x) = 10.3
max(x) = 23.4
R := max(x) - min(x)
k := floor(sqrt(n)) = 7
d := 1.9
I1 := [min(x), min(x) + d] = [10.3, 12.2]
I2 := [max(I1), max(I1) + d] = [12.2, 14.1]
I3 := [max(I2), max(I2) + d] = [14.1, 16]
I4 := [max(I3), max(I3) + d] = [16, 17.9]
I5 := [max(I4), max(I4) + d] = [17.9, 19.8]
I6 := [max(I5), max(I5) + d] = [19.8, 21.7]
I7 := [max(I6), max(I6) + d] = [21.7, 23.6]
m1 := 10
m2 := 1
m3 := 10
m4 := 9
m5 := 13
m6 := 2
m7 := 5
p1 := m1/n = 0.2
p2 := m2/n = 0.02
p3 := m3/n = 0.2
p4 := m4/n = 0.18
p5 := m5/n = 0.26
p6 := m6/n = 0.04
p7 := m7/n = 0.1
I1_mid := (10.3 + 12.171)/2 = 11.2355
I2_mid := (12.171 + 14.043)/2 = 13.107
I3_mid := (14.043 + 15.914)/2 = 14.9785
I4_mid := (15.914 + 17.786)/2 = 16.85
I5_mid := (17.786 + 19.657)/2 = 18.7215
I6_mid := (19.657 + 21.529)/2 = 20.593
I7_mid := (21.529 + 23.4)/2 = 22.4645
a := [I1_mid; I2_mid; I3_mid; I4_mid; I5_mid; I6_mid; I7_mid] = [11.2355; 13.107; 14.9785; 16.85; 18.7215; 20.593; 22.4645]
p := [p1; p2; p3; p4; p5; p6; p7] = [0.2; 0.02; 0.2; 0.18; 0.26; 0.04; 0.1]
# Построение эмпирической функции распределения
z1 := p1 = 0.2
z2 := p1 + p2 = 0.22
z3 := p1 + p2 + p3 = 0.42
z4 := p1 + p2 + p3 + p4 = 0.6
z5 := p1 + p2 + p3 + p4 + p5 = 0.86
z6 := p1 + p2 + p3 + p4 + p5 + p6 = 0.9
z7 := p1 + p2 + p3 + p4 + p5 + p6 + p7 = 1
i := 0 .. 6
z := [z1; z2; z3; z4; z5; z6; z7] = [0.2; 0.22; 0.42; 0.6; 0.86; 0.9; 1]
# [plot: z[i] vs a[i]]
# Построение эмпирической плотности распределения
f1 := p1/d = 0.105263
f2 := p2/d = 0.0105263
f3 := p3/d = 0.105263
f4 := p4/d = 0.0947368
f5 := p5/d = 0.136842
f6 := p6/d = 0.0210526
f7 := p7/d = 0.0526316
f_ := [f1; f2; f3; f4; f5; f6; f7] = [0.105263; 0.0105263; 0.105263; 0.0947368; 0.136842; 0.0210526; 0.0526316]
# Получение точечных статистических оценок
x_ := sum(a[i]*p[i], i = 0 .. k - 1) = 16.4757
S := sum((a[i]^2)*p[i], i = 0 .. k - 1) - x_^2 = 11.7684
s := sqrt(n/(n - 1)*S) = 3.46534
# Выборочная асимметрия
A := 1/s^3*sum((a[i] - x_)^3*p[i], i = 0 .. k - 1) = -0.0718282
# Выборочный эксцесс
E := 1/s^4*sum((a[i] - x_)^4*p[i], i = 0 .. k - 1) - 3 = -0.911783
a_ := x_ = 16.4757
σ := s = 3.46534
f(x) := 1/(sqrt(2*π)*σ)*e^(-(x - a_)^2/(2*σ^2))
# [plot: f_[i], f(a[i]) vs a[i]]
# Проверка гипотезы о нормальном распределении
Q := mean(M) = 16.42
F(x) := 1/sqrt(2*π)*integral(e^(-t^2/2), t = 0 .. x)
W := stdev(M) = 3.70626
p1_ := F((12.2 - Q)/W) + 0.5 = 0.127432
p2_ := F((14.1 - Q)/W) - F((12.2 - Q)/W) = 0.138236
p3_ := F((16 - Q)/W) - F((14.1 - Q)/W) = 0.18922
p4_ := F((17.9 - Q)/W) - F((16 - Q)/W) = 0.200285
p5_ := F((19.8 - Q)/W) - F((17.9 - Q)/W) = 0.163935
p6_ := F(∞) - F((19.8 - Q)/W) = 0.180892
F(∞) = 0.5
m1_ := n*p1_ = 6.37162
m2_ := n*p2_ = 6.91179
m3_ := n*p3_ = 9.46098
m4_ := n*p4_ = 10.0142
m5_ := n*p5_ = 8.19674
m6_ := n*p6_ = 9.04462
M2 := [m1_; m2_; m3_; m4_; m5_; m6_] = [6.37162; 6.91179; 9.46098; 10.0142; 8.19674; 9.04462]
M1 := [m1; m3; m4; m5 - 2; m6 + m2 + 2; m7] = [10; 10; 9; 11; 5; 5]
M1_ := [m1_; m3_; m4_; m5_ - 2; m6_ + m2_ + 2; m7_]  # error: Эта переменная не определена. Проверьте правильность установки обозначения.
χ_набл := sum((M1[i] - M2[i])/M2[i], i = 0 .. 5) = 0.228787
# По таблице критических точек распределения χкр, по уровню значимости α = 0,01 и числу степеней свободы ν = 5 – 3 = 2 найдем критическую точку правосторонней области χкр=9.2. Так как χ_набл < χкр– нет оснований отвергнуть гипотезу о нормальном распределении.
# Проверка истинности по критерию Колмогорова
a_0 := 10.3
Fn_0 := 0
a_1 := 12.171
Fn_1 := 0.2
a_2 := 14.043
Fn_2 := 0.22
a_3 := 15.914
Fn_3 := 0.42
a_4 := 17.786
Fn_4 := 0.6
a_5 := 19.657
Fn_5 := 0.86
a_6 := 21.529
Fn_6 := 0.9
a_7 := 23.4
Fn_7 := 1
F_10.3_1 := F((10.3 - x_)/s) = -0.462636
F_12.171_1 := F((12.171 - x_)/s) = -0.392921
F_14.043_1 := F((14.043 - x_)/s) = -0.258663
F_15.914_1 := F((15.914 - x_)/s) = -0.0643828
F_17.786_1 := F((17.786 - x_)/s) = 0.147328
F_19.657_1 := F((19.657 - x_)/s) = 0.320699
F_21.529_1 := F((21.529 - x_)/s) = 0.427613
F_23.4_1 := F((23.4 - x_)/s) = 0.47715
F_10.3 := 0.5 + F((10.3 - x_)/s) = 0.0373639
F_12.171 := 0.5 + F((12.171 - x_)/s) = 0.107079
F_14.043 := 0.5 + F((14.043 - x_)/s) = 0.241337
F_15.914 := 0.5 + F((15.914 - x_)/s) = 0.435617
F_17.786 := 0.5 + F((17.786 - x_)/s) = 0.647328
F_19.657 := 0.5 + F((19.657 - x_)/s) = 0.820699
F_21.529 := 0.5 + F((21.529 - x_)/s) = 0.927613
F_23.4 := 0.5 + F((23.4 - x_)/s) = 0.97715
|F_10.3 - Fn_0| = 0.0373639
|F_12.171 - Fn_1| = 0.0929212
a1 := 12.171
|F_14.043 - Fn_2| = 0.0213371
|F_15.914 - Fn_3| = 0.0156172
|F_17.786 - Fn_4| = 0.0473275
|F_19.657 - Fn_5| = 0.0393008
|F_21.529 - Fn_6| = 0.0276126
|F_23.4 - Fn_7| = 0.0228499
ζn := sqrt(n)*0.093 = 0.657609
# Из таблицы распределения Колмогорова (прил. 5) при заданном уровне значимости q = 0,01 находим λq = 1,627.
# Так как ξn = 0,262 < λq = 1,627, основная гипотеза H0 принимается, то есть генеральное распределение считается нормальным
k := 6
d := R/k = 2.18333
p1 := 10/50 = 0.2
f1 := p1/d = 0.0916031
p2 := 10/50 = 0.2
f2 := p2/d = 0.0916031
p3 := 9/50 = 0.18
f3 := p3/d = 0.0824427
p4 := 11/50 = 0.22
f4 := p4/d = 0.100763
p5 := 5/50 = 0.1
f5 := p5/d = 0.0458015
p6 := 5/50 = 0.1
f6 := p6/d = 0.0458015
I1 := [min(x), min(x) + d] = [10.3, 12.4833]
I2 := [max(I1), max(I1) + d] = [12.4833, 14.6667]
I3 := [max(I2), max(I2) + d] = [14.6667, 16.85]
I4 := [max(I3), max(I3) + d] = [16.85, 19.0333]
I5 := [max(I4), max(I4) + d] = [19.0333, 21.2167]
I6 := [max(I5), max(I5) + d] = [21.2167, 23.4]
I1_mid := (10.3 + 12.483)/2 = 11.3915
I2_mid := (12.483 + 14.667)/2 = 13.575
I3_mid := (14.667 + 16.85)/2 = 15.7585
I4_mid := (16.85 + 19.033)/2 = 17.9415
I5_mid := (19.033 + 21.217)/2 = 20.125
I6_mid := (21.217 + 23.4)/2 = 22.3085
f_ := [f1; f2; f3; f4; f5; f6] = [0.0916031; 0.0916031; 0.0824427; 0.100763; 0.0458015; 0.0458015]
a := [I1_mid; I2_mid; I3_mid; I4_mid; I5_mid; I6_mid] = [11.3915; 13.575; 15.7585; 17.9415; 20.125; 22.3085]
j := 0 .. 49
f(x) := 1/(sqrt(2*π)*σ)*e^(-(x - a_)^2/(2*σ^2))
# [plot: f_[i], f(x[j]) vs a[i], x[j]]
